*Heading
** Job name: Free Model name: Model-1
** Generated by: Abaqus/CAE 2021
*Preprint, echo=NO, model=NO, history=NO, contact=NO
**
** PARTS
**
*Part, name=Part-2
*Node
      1,        11.25,         -40.,          60.
      2,        11.25,         -39.,          60.
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*Element, type=C3D8
    1,  4942,  4943,  5024,  5023,     1,     2,    83,    82
    2,  4943,  4944,  5025,  5024,     2,     3,    84,    83
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*Nset, nset=fix
     1,     2,     3,     4,     5,     6
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*Elset, elset=fix
     1,     2,     3,     4,     5,     6
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*Nset, nset=block, generate
     1,  24705,      1
*Elset, elset=block, generate
     1,  19200,      1
*Nset, nset=surfaceblock
     1,     2,     3,     4,     5,     6
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*Elset, elset=surfaceblock
     1,     2,     3,     4,     5,     6
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*Nset, nset=surfacepressure, generate
    1,  4941,     1
*Elset, elset=surfacepressure, generate
    1,  4800,     1
*Elset, elset=_surfaceblock_S1, internal, generate
 14401,  19200,      1
*Elset, elset=_surfaceblock_S6, internal, generate
     1,  19121,     80
*Elset, elset=_surfaceblock_S2, internal, generate
    1,  4800,     1
*Elset, elset=_surfaceblock_S4, internal, generate
    80,  19200,     80
*Elset, elset=_surfaceblock_S3, internal
     1,     2,     3,     4,     5,     6
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*Elset, elset=_surfaceblock_S5, internal
  4721,  4722,  4723,  4724,  4725,  4726
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*Surface, type=ELEMENT, name=surfaceblock
_surfaceblock_S1, S1
_surfaceblock_S6, S6
_surfaceblock_S2, S2
_surfaceblock_S4, S4
_surfaceblock_S3, S3
_surfaceblock_S5, S5
*Elset, elset=_surfacepressure_S2, internal, generate
    1,  4800,     1
*Surface, type=ELEMENT, name=surfacepressure
_surfacepressure_S2, S2
** Section: Section22
*Solid Section, elset=block, material=Rubber_2
,
*End Part
**
*Part, name=final_model
*Node
      1,   3.09950089,  0.144070998,           0.
      2,   3.09950089,  0.144070998,          80.
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*Element, type=C3D4
    1, 5233, 5234, 5235, 5236
    2, 5233, 5237, 5234, 5238
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*Nset, nset=surface_0_Head
    2,   79,   80,   81,   82,   83
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*Elset, elset=surface_0_Head
    79,   247,   248,   592,   688,  1727
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*Nset, nset=surface_0_Bottom
   1,   5,   6,   7,   8,   9
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*Elset, elset=surface_0_Bottom
  2205,  2372,  2678,  3212,  4457,  5349
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*Nset, nset=surface_1_Lateral
    3,    4,  103,  104,  105,  106
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*Elset, elset=surface_1_Lateral
    38,    68,   146,   276,   303,   352
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*Nset, nset=surface_1_Head
    4,  173,  174,  175,  176,  177
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*Elset, elset=surface_1_Head
    24,    94,   110,   672,   697,   822
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*Nset, nset=surface_1_Bottom
    3,  103,  104,  105,  106,  107
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*Elset, elset=surface_1_Bottom
  6867,  7133,  7336,  7800,  7975,  8015
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*Nset, nset=surface_0_Lateral
    1,    2,    5,    6,    7,    8
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*Elset, elset=surface_0_Lateral
     4,    30,    53,    54,    61,    77
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*Nset, nset=RubberSet, generate
    1,  8218,     1
*Elset, elset=RubberSet, generate
     1,  33612,      1
*Nset, nset=surface_0_All
    1,    2,    5,    6,    7,    8
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*Elset, elset=surface_0_All
     4,    30,    53,    54,    61,    77
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*Nset, nset=surface_1_All
    3,    4,  103,  104,  105,  106
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*Elset, elset=surface_1_All
    24,    38,    68,    94,   110,   146
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*Elset, elset=_surface_1_All_S3, internal
    24,    38,    94,   110,   352,   391
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*Elset, elset=_surface_1_All_S4, internal
    68,   146,   835,  1208,  1411,  1763
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*Elset, elset=_surface_1_All_S2, internal
   276,   788,  1287,  2245,  2607,  3135
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*Elset, elset=_surface_1_All_S1, internal
   303,   496,  1002,  1005,  1179,  2018
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*Surface, type=ELEMENT, name=surface_1_All
_surface_1_All_S3, S3
_surface_1_All_S4, S4
_surface_1_All_S2, S2
_surface_1_All_S1, S1
*Elset, elset=_surface_0_All_S3, internal
    30,    53,    54,    77,    79,   126
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*Elset, elset=_surface_0_All_S1, internal
     4,    61,   457,   564,  1334,  1378
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*Elset, elset=_surface_0_All_S2, internal
   239,  2606,  3810,  3884,  5698,  7112
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*Elset, elset=_surface_0_All_S4, internal
   121,   140,   158,   221,   234,   255
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*Surface, type=ELEMENT, name=surface_0_All
_surface_0_All_S3, S3
_surface_0_All_S1, S1
_surface_0_All_S2, S2
_surface_0_All_S4, S4
** Section: Rubber
*Solid Section, elset=RubberSet, material=Rubber
,
*End Part
**
**
** ASSEMBLY
**
*Assembly, name=Assembly
**
*Instance, name=final_model-1, part=final_model
*End Instance
**
*Instance, name=Part-2-1, part=Part-2
          0.,           0.,          40.
*End Instance
**
*Node
      1,           0.,           0.,          80.
*Nset, nset=RP1
 1,
*Nset, nset=_PickedSet6, internal
 1,
*Elset, elset=_Surf-2_S1, internal, instance=final_model-1
     4,    61,   457,   564,  1334,  1378
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*Elset, elset=_Surf-2_S3, internal, instance=final_model-1
    30,    53,    54,    77,   126,   159
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*Elset, elset=_Surf-2_S4, internal, instance=final_model-1
   121,   140,   158,   221,   234,   255
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*Elset, elset=_Surf-2_S2, internal, instance=final_model-1
   239,  2606,  3810,  3884,  5698,  7112
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*Surface, type=ELEMENT, name=Surf-2
_Surf-2_S1, S1
_Surf-2_S3, S3
_Surf-2_S4, S4
_Surf-2_S2, S2
*Elset, elset=__PickedSurf33_S3, internal, instance=final_model-1
    79,   247,   248,   592,   688,  1727
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*Elset, elset=__PickedSurf33_S1, internal, instance=final_model-1
  8433, 12017, 12235, 12286, 25764
*Elset, elset=__PickedSurf33_S2, internal, instance=final_model-1
 11523, 12015, 12220, 22388, 25776, 25778, 25802
*Elset, elset=__PickedSurf33_S4, internal, instance=final_model-1
 11969, 11971, 12279, 23565, 24503, 25767, 25777, 25852
*Surface, type=ELEMENT, name=_PickedSurf33, internal
__PickedSurf33_S3, S3
__PickedSurf33_S1, S1
__PickedSurf33_S2, S2
__PickedSurf33_S4, S4
** Constraint: Constraint-1
*Coupling, constraint name=Constraint-1, ref node=_PickedSet6, surface=_PickedSurf33
*Kinematic
*End Assembly
**
** MATERIALS
**
*Material, name=Rubber
*Density
0.,
*Hyperelastic, neo hooke
 0.240803, 0.41667
*Material, name=Rubber_2
*Density
0.,
*Hyperelastic, neo hooke
 0.00240803, 41.667
*Material, name=Skeleton
*Density
 1.1e-09,
*Elastic
100000., 0.45
**
** INTERACTION PROPERTIES
**
*Surface Interaction, name=IntProp-1
1.,
*Surface Behavior, pressure-overclosure=HARD
*Time Points, name=TimePoints-1, GENERATE
0., 1., 0.05
**
** BOUNDARY CONDITIONS
**
** Name: BC-1 Type: Displacement/Rotation
*Boundary
final_model-1.surface_0_Bottom, 1, 1
final_model-1.surface_0_Bottom, 2, 2
final_model-1.surface_0_Bottom, 3, 3
final_model-1.surface_0_Bottom, 4, 4
final_model-1.surface_0_Bottom, 5, 5
final_model-1.surface_0_Bottom, 6, 6
** Name: BC-2 Type: Displacement/Rotation
*Boundary
Part-2-1.fix, 1, 1
Part-2-1.fix, 2, 2
Part-2-1.fix, 3, 3
Part-2-1.fix, 4, 4
Part-2-1.fix, 5, 5
Part-2-1.fix, 6, 6
**
** INTERACTIONS
**
** Interaction: Int-2
*Contact Pair, interaction=IntProp-1, type=SURFACE TO SURFACE
Part-2-1.surfaceblock, final_model-1.surface_0_All
** ----------------------------------------------------------------
**
** STEP: Step-Pressure
**
*Step, name=Step-Pressure, nlgeom=YES
*Static
1., 1., 1e-05, 1.
**
** LOADS
**
** Name: Load-1   Type: Pressure
*Dsload
final_model-1.surface_1_All, P, 0.02
**
** OUTPUT REQUESTS
**
*Restart, write, frequency=0
**
** FIELD OUTPUT: F-Output-1
**
*Output, field
*Node Output
CF, RF, RM, RT, TF, U, VF
*Element Output, directions=YES
ALPHA, ALPHAN, BF, CENTMAG, CENTRIFMAG, CORIOMAG, CS11, CTSHR, E, EE, EEQUT, ELEDEN, ELEN, ENER, ER, ESF1
GRAV, HP, IE, LE, MISES, MISESMAX, MISESONLY, NE, NFORC, NFORCSO, P, PE, PEEQ, PEEQMAX, PEEQT, PEMAG
PEQC, PRESSONLY, PS, ROTAMAG, S, SALPHA, SE, SEE, SEP, SEPE, SEQUT, SF, SPE, SQEQ, SSAVG, TE
TEEQ, TEVOL, THE, TRIAX, TRNOR, TRSHR, TSHR, VE, VEEQ, VS, YIELDPOT
**
** HISTORY OUTPUT: H-Output-1
**
*Output, history, variable=PRESELECT
*End Step
