*Heading
** Job name: TopOptRun Model name: Model-1
** Generated by: Abaqus/CAE 2021
*Preprint, echo=NO, model=NO, history=NO, contact=NO
**
** PARTS
**
*Part, name=final_model
*Node
      1,   18.8821278,   9.17237091,           0.
      2,  -18.8821278,  -9.17237091,           0.
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*Element, type=C3D4
     1, 19762, 19763, 19764, 19765
     2, 19766, 19767, 19768, 19762
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*Nset, nset=surface_0_All
    1,    2,    3,    4,   21,   22
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*Elset, elset=surface_0_All
     53,    157,    169,    361,    377,    421
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*Nset, nset=surface_0_Head
    3,    4,  161,  162,  163,  164
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*Elset, elset=surface_0_Head
    157,    541,   1004,   1169,   1478,   1769
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*Nset, nset=surface_0_Bottom
    1,    2,   21,   22,   23,   24
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*Elset, elset=surface_0_Bottom
    421,   1913,   2841,   3556,   3981,   4588
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*Nset, nset=surface_0_Lateral
    1,    2,    3,    4,   21,   22
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*Elset, elset=surface_0_Lateral
     53,    157,    169,    361,    377,    668
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*Nset, nset=surface_1_All
    17,    18,    19,    20,   896,   897
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*Elset, elset=surface_1_All
     38,     39,    192,    331,    605,    809
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*Nset, nset=surface_1_Head
    19,    20,  1024,  1025,  1026,  1027
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*Elset, elset=surface_1_Head
     39,    192,    331,    605,    809,    961
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*Elset, elset=RubberSet, generate
      1,  176046,       1
*Elset, elset=_surface_0_All_S4, internal
     53,    169,    541,    922,   1432,   1786
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*Elset, elset=_surface_0_All_S3, internal
    157,    361,    377,    421,    668,    678
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*Elset, elset=_surface_0_All_S2, internal
    157,    844,   1574,   1797,   3149,   4558
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*Elset, elset=_surface_0_All_S1, internal
   3762,   4107,   4634,   5514,   5544,   7489
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*Surface, type=ELEMENT, name=surface_0_All
_surface_0_All_S4, S4
_surface_0_All_S3, S3
_surface_0_All_S2, S2
_surface_0_All_S1, S1
*Elset, elset=_surface_1_All_S1, internal
   1066,   1707,   5705,   6386,  10757,  13435
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*Elset, elset=_surface_1_All_S2, internal
     38,   1072,   2132,  10051,  13139,  13244
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*Elset, elset=_surface_1_All_S4, internal
   1056,   1092,   1238,   2596,   3309,   4722
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*Elset, elset=_surface_1_All_S3, internal
     39,    192,    331,    605,    809,    961
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*Surface, type=ELEMENT, name=surface_1_All
_surface_1_All_S1, S1
_surface_1_All_S2, S2
_surface_1_All_S4, S4
_surface_1_All_S3, S3
*Elset, elset=_surface_2_All_S2, internal
    690,   6899,   8037,  12841,  15771,  15801
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*Elset, elset=_surface_2_All_S4, internal
    725,    765,   1142,   1394,   1917,   2685
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*Elset, elset=_surface_2_All_S3, internal
    547,    996,   1644,   2163,   3095,   3502
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*Elset, elset=_surface_2_All_S1, internal
   1395,   1546,   4714,   5369,   5783,   8737
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*Surface, type=ELEMENT, name=surface_2_All
_surface_2_All_S2, S2
_surface_2_All_S4, S4
_surface_2_All_S3, S3
_surface_2_All_S1, S1
*Elset, elset=_surface_3_All_S3, internal
   1195,   1259,   1606,   1828,   2511,   3640
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*Elset, elset=_surface_3_All_S4, internal
     36,    878,   1291,   1416,   5576,   6864
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*Elset, elset=_surface_3_All_S1, internal
    691,   1451,   1740,   2812,   4496,   9653
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*Elset, elset=_surface_3_All_S2, internal
  14766,  15154,  15265,  15853,  18626,  20747
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*Surface, type=ELEMENT, name=surface_3_All
_surface_3_All_S3, S3
_surface_3_All_S4, S4
_surface_3_All_S2, S2
_surface_3_All_S1, S1
*Elset, elset=_surface_4_All_S2, internal
    106,  13790,  14731,  19705,  19785,  20685
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*Elset, elset=_surface_4_All_S3, internal
   2531,   6843,  12859,  12920,  12931,  12963
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*Elset, elset=_surface_4_All_S4, internal
   2133,   9565,  14657,  15052,  19682,  22647
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*Elset, elset=_surface_4_All_S1, internal
  23072,  23714,  24111,  25568,  28616,  35864
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*Surface, type=ELEMENT, name=surface_4_All
_surface_4_All_S2, S2
_surface_4_All_S3, S3
_surface_4_All_S4, S4
_surface_4_All_S1, S1
** Section: Rubber
*Solid Section, elset=RubberSet, material=Rubber
,
*End Part
**
**
** ASSEMBLY
**
*Assembly, name=Assembly
**
*Instance, name=final_model-1, part=final_model
*End Instance
**
*End Assembly
**
** MATERIALS
**
*Material, name=Rubber
*Density
 1.08e-09,
*Hyperelastic, neo hooke
 0.241, 0.416667,       0.,       0.,       0.,       0.
**
** BOUNDARY CONDITIONS
**
** Name: BC-1 Type: Displacement/Rotation
*Boundary
final_model-1.surface_0_Bottom, 1, 1
final_model-1.surface_0_Bottom, 2, 2
final_model-1.surface_0_Bottom, 3, 3
final_model-1.surface_0_Bottom, 4, 4
final_model-1.surface_0_Bottom, 5, 5
final_model-1.surface_0_Bottom, 6, 6
