*Heading
** Job name: base Model name: Model-1
** Generated by: Abaqus/CAE 2021
*Preprint, echo=NO, model=NO, history=NO, contact=NO
**
** PARTS
**
*Part, name=base
*Node
      1,  -99.5184708,  -9.80171394,           0.
      2,        -100.,           0.,           0.
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*Element, type=C3D4
     1, 10080, 10081, 10082, 10083
     2, 10084, 10080, 10082, 10085
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*Nset, nset=Set-1, generate
     1,  22899,      1
*Elset, elset=Set-1, generate
      1,  107307,       1
*Nset, nset=base
    1,    2,    3,    4,    5,    6
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*Elset, elset=base
    133,    339,    497,    753,    798,    852
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*Elset, elset=_contact_S2, internal
     69,    787,    809,    961,   1160,   1656
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*Elset, elset=_contact_S3, internal
    179,    253,    299,    344,    421,    515
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*Elset, elset=_contact_S4, internal
    590,    669,   1094,   1198,   1230,   1347
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*Elset, elset=_contact_S1, internal
    782,    878,   1276,   2520,   3327,   3577
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*Surface, type=ELEMENT, name=contact
_contact_S2, S2
_contact_S3, S3
_contact_S4, S4
_contact_S1, S1
** Section: Section-1
*Solid Section, elset=Set-1, material=Material-1
,
*End Part
**
**
** ASSEMBLY
**
*Assembly, name=Assembly
**
*Instance, name=base-1, part=base
*End Instance
**
*End Assembly
**
** MATERIALS
**
*Material, name=Material-1
*Hyperelastic, neo hooke
 0.24, 0.4
