*Heading
** Job name: TopOptRun Model name: Model-1
** Generated by: Abaqus/CAE 2021
*Preprint, echo=NO, model=NO, history=NO, contact=NO
**
** PARTS
**
*Part, name=final_model
*Node
      1,   2.03805137,   7.97831917,           0.
      2,   2.03805137,   7.97831917,          80.
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*Element, type=C3D4
    1, 10074,  2887, 10075,  2883
    2, 10076, 10077, 10078,  5333
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*Nset, nset=surface_0_All
    1,    2,    5,    6,    7,    8
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*Elset, elset=surface_0_All
    54,    72,    85,   155,   219,   227
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*Nset, nset=surface_0_Head
    2,  144,  145,  146,  147,  148
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*Elset, elset=surface_0_Head
   219,  2802,  5575,  5861,  5907,  5992
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*Nset, nset=surface_0_Bottom
   1,   5,   6,   7,   8,   9
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*Elset, elset=surface_0_Bottom
  3271,  6666,  6690,  8166,  8168,  8302
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*Nset, nset=surface_0_Lateral
    1,    2,    5,    6,    7,    8
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*Elset, elset=surface_0_Lateral
    54,    72,    85,   155,   227,   268
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*Nset, nset=surface_1_All
     3,     4,   190,   191,   192,   193
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*Elset, elset=surface_1_All
    69,    84,    86,   139,   244,   254
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*Nset, nset=surface_1_Head
    3,  190,  191,  192,  193,  194
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*Elset, elset=surface_1_Head
  1455,  1457,  1461,  7081, 13525, 19942
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*Elset, elset=RubberSet, generate
     1,  94240,      1
*Nset, nset=Constraint_Nodes-1
    2,  144,  145,  146,  147,  148
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*Elset, elset=_surface_0_All_S4, internal
    54,   155,   227,   367,   482,   786
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*Elset, elset=_surface_0_All_S3, internal
    72,    85,   268,   416,   492,   572
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*Elset, elset=_surface_0_All_S1, internal
   272,   274,   576,   655,   933,   989
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*Elset, elset=_surface_0_All_S2, internal
   219,   522,   541,   768,  3570,  4165
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*Surface, type=ELEMENT, name=surface_0_All
_surface_0_All_S4, S4
_surface_0_All_S3, S3
_surface_0_All_S2, S2
_surface_0_All_S1, S1
*Elset, elset=_surface_1_All_S3, internal
    69,    86,   139,   244,   254,   299
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*Elset, elset=_surface_1_All_S1, internal
    84,   437,   443,   490,   819,  1073
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*Elset, elset=_surface_1_All_S4, internal
   278,   319,   383,   511,   518,   693
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*Elset, elset=_surface_1_All_S2, internal
   384,  4546, 13138, 13950, 17065, 17439
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*Surface, type=ELEMENT, name=surface_1_All
_surface_1_All_S3, S3
_surface_1_All_S1, S1
_surface_1_All_S4, S4
_surface_1_All_S2, S2
** Section: Rubber
*Solid Section, elset=RubberSet, material=Rubber
,
*End Part
**
**
** ASSEMBLY
**
*Assembly, name=Assembly
**
*Instance, name=final_model-1, part=final_model
*End Instance
**
*Node
      1,           0.,           0.,          80.
*Nset, nset=RP1
 1,
*Nset, nset=_PickedSet9, internal
 1,
*Surface, type=NODE, name=final_model-1_Constraint_Nodes-1_CNS_, internal
final_model-1.Constraint_Nodes-1, 1.
** Constraint: Constraint-1
*Coupling, constraint name=Constraint-1, ref node=_PickedSet9, surface=final_model-1_Constraint_Nodes-1_CNS_
*Kinematic
*End Assembly
**
** MATERIALS
**
*Material, name=Rubber
*Density
 1.08e-09,
*Hyperelastic, neo hooke
 0.225, 0.444444,       0.,       0.,       0.,       0.
*Material, name=mat_1
*Density
 1.08e-09,
*Hyperelastic, neo hooke
 0.1125, 0.888889,       0.,       0.,       0.,       0.
*Material, name=mat_2
*Density
 1.08e-09,
*Hyperelastic, neo hooke
 0.113636,0.880000105600013,   0.,   0.,   0.,   0.
*Material, name=mat_3
*Density
 1.08e-09,
*Hyperelastic, neo hooke
 0.114773, 0.871287,       0.,       0.,       0.,       0.
*Material, name=mat_4
*Density
 1.08e-09,
*Hyperelastic, neo hooke
 0.115909, 0.862745,       0.,       0.,       0.,       0.
*Material, name=mat_5
*Density
 1.08e-09,
*Hyperelastic, neo hooke
 0.117045, 0.854369,       0.,       0.,       0.,       0.
*Material, name=mat_6
*Density
 1.08e-09,
*Hyperelastic, neo hooke
 0.118182, 0.846154,       0.,       0.,       0.,       0.
*Material, name=mat_7
*Density
 1.08e-09,
*Hyperelastic, neo hooke
 0.119318, 0.838095,       0.,       0.,       0.,       0.
*Material, name=mat_8
*Density
 1.08e-09,
*Hyperelastic, neo hooke
 0.120455, 0.830189,       0.,       0.,       0.,       0.
*Material, name=mat_9
*Density
 1.08e-09,
*Hyperelastic, neo hooke
 0.121591, 0.82243,      0.,      0.,      0.,      0.
*Material, name=mat_10
*Density
 1.08e-09,
*Hyperelastic, neo hooke
 0.122727, 0.814815,       0.,       0.,       0.,       0.
*Material, name=mat_11
*Density
 1.08e-09,
*Hyperelastic, neo hooke
 0.123864, 0.807339,       0.,       0.,       0.,       0.
*Material, name=mat_12
*Density
 1.08e-09,
*Hyperelastic, neo hooke
 0.125, 0.8,  0.,  0.,  0.,  0.
*Material, name=mat_13
*Density
 1.08e-09,
*Hyperelastic, neo hooke
 0.126136, 0.792793,       0.,       0.,       0.,       0.
*Material, name=mat_14
*Density
 1.08e-09,
*Hyperelastic, neo hooke
 0.127273, 0.785714,       0.,       0.,       0.,       0.
*Material, name=mat_15
*Density
 1.08e-09,
*Hyperelastic, neo hooke
 0.128409, 0.778761,       0.,       0.,       0.,       0.
*Material, name=mat_16
*Density
 1.08e-09,
*Hyperelastic, neo hooke
 0.129545, 0.77193,      0.,      0.,      0.,      0.
*Material, name=mat_17
*Density
 1.08e-09,
*Hyperelastic, neo hooke
 0.130682, 0.765217,       0.,       0.,       0.,       0.
*Material, name=mat_18
*Density
 1.08e-09,
*Hyperelastic, neo hooke
 0.131818, 0.758621,       0.,       0.,       0.,       0.
*Material, name=mat_19
*Density
 1.08e-09,
*Hyperelastic, neo hooke
 0.132955, 0.752137,       0.,       0.,       0.,       0.
*Material, name=mat_20
*Density
 1.08e-09,
*Hyperelastic, neo hooke
 0.134091, 0.745763,       0.,       0.,       0.,       0.
*Material, name=mat_21
*Density
 1.08e-09,
*Hyperelastic, neo hooke
 0.135227, 0.739496,       0.,       0.,       0.,       0.
*Material, name=mat_22
*Density
 1.08e-09,
*Hyperelastic, neo hooke
 0.136364, 0.733333,       0.,       0.,       0.,       0.
*Material, name=mat_23
*Density
 1.08e-09,
*Hyperelastic, neo hooke
 0.1375, 0.727273,       0.,       0.,       0.,       0.
*Material, name=mat_24
*Density
 1.08e-09,
*Hyperelastic, neo hooke
 0.138636, 0.721312,       0.,       0.,       0.,       0.
*Material, name=mat_25
*Density
 1.08e-09,
*Hyperelastic, neo hooke
 0.139773, 0.715447,       0.,       0.,       0.,       0.
*Material, name=mat_26
*Density
 1.08e-09,
*Hyperelastic, neo hooke
 0.140909, 0.709677,       0.,       0.,       0.,       0.
*Material, name=mat_27
*Density
 1.08e-09,
*Hyperelastic, neo hooke
 0.142045, 0.704,    0.,    0.,    0.,    0.
*Material, name=mat_28
*Density
 1.08e-09,
*Hyperelastic, neo hooke
 0.143182, 0.698413,       0.,       0.,       0.,       0.
*Material, name=mat_29
*Density
 1.08e-09,
*Hyperelastic, neo hooke
 0.144318, 0.692913,       0.,       0.,       0.,       0.
*Material, name=mat_30
*Density
 1.08e-09,
*Hyperelastic, neo hooke
 0.145455, 0.6875,     0.,     0.,     0.,     0.
*Material, name=mat_31
*Density
 1.08e-09,
*Hyperelastic, neo hooke
 0.146591, 0.682171,       0.,       0.,       0.,       0.
*Material, name=mat_32
*Density
 1.08e-09,
*Hyperelastic, neo hooke
 0.147727, 0.676923,       0.,       0.,       0.,       0.
*Material, name=mat_33
*Density
 1.08e-09,
*Hyperelastic, neo hooke
 0.148864, 0.671756,       0.,       0.,       0.,       0.
*Material, name=mat_34
*Density
 1.08e-09,
*Hyperelastic, neo hooke
 0.15, 0.666667,       0.,       0.,       0.,       0.
*Material, name=mat_35
*Density
 1.08e-09,
*Hyperelastic, neo hooke
 0.151136, 0.661654,       0.,       0.,       0.,       0.
*Material, name=mat_36
*Density
 1.08e-09,
*Hyperelastic, neo hooke
 0.152273, 0.656716,       0.,       0.,       0.,       0.
*Material, name=mat_37
*Density
 1.08e-09,
*Hyperelastic, neo hooke
 0.153409, 0.651852,       0.,       0.,       0.,       0.
*Material, name=mat_38
*Density
 1.08e-09,
*Hyperelastic, neo hooke
 0.154545, 0.647059,       0.,       0.,       0.,       0.
*Material, name=mat_39
*Density
 1.08e-09,
*Hyperelastic, neo hooke
 0.155682, 0.642336,       0.,       0.,       0.,       0.
*Material, name=mat_40
*Density
 1.08e-09,
*Hyperelastic, neo hooke
 0.156818, 0.637681,       0.,       0.,       0.,       0.
*Material, name=mat_41
*Density
 1.08e-09,
*Hyperelastic, neo hooke
 0.157955, 0.633094,       0.,       0.,       0.,       0.
*Material, name=mat_42
*Density
 1.08e-09,
*Hyperelastic, neo hooke
 0.159091, 0.628571,       0.,       0.,       0.,       0.
*Material, name=mat_43
*Density
 1.08e-09,
*Hyperelastic, neo hooke
 0.160227, 0.624114,       0.,       0.,       0.,       0.
*Material, name=mat_44
*Density
 1.08e-09,
*Hyperelastic, neo hooke
 0.161364, 0.619718,       0.,       0.,       0.,       0.
*Material, name=mat_45
*Density
 1.08e-09,
*Hyperelastic, neo hooke
 0.1625, 0.615385,       0.,       0.,       0.,       0.
*Material, name=mat_46
*Density
 1.08e-09,
*Hyperelastic, neo hooke
 0.163636, 0.611111,       0.,       0.,       0.,       0.
*Material, name=mat_47
*Density
 1.08e-09,
*Hyperelastic, neo hooke
 0.164773, 0.606896,       0.,       0.,       0.,       0.
*Material, name=mat_48
*Density
 1.08e-09,
*Hyperelastic, neo hooke
 0.165909, 0.60274,      0.,      0.,      0.,      0.
*Material, name=mat_49
*Density
 1.08e-09,
*Hyperelastic, neo hooke
 0.167045, 0.598639,       0.,       0.,       0.,       0.
*Material, name=mat_50
*Density
 1.08e-09,
*Hyperelastic, neo hooke
 0.168182, 0.594595,       0.,       0.,       0.,       0.
*Material, name=mat_51
*Density
 1.08e-09,
*Hyperelastic, neo hooke
 0.169318, 0.590604,       0.,       0.,       0.,       0.
*Material, name=mat_52
*Density
 1.08e-09,
*Hyperelastic, neo hooke
 0.170455, 0.586667,       0.,       0.,       0.,       0.
*Material, name=mat_53
*Density
 1.08e-09,
*Hyperelastic, neo hooke
 0.171591, 0.582781,       0.,       0.,       0.,       0.
*Material, name=mat_54
*Density
 1.08e-09,
*Hyperelastic, neo hooke
 0.172727, 0.578947,       0.,       0.,       0.,       0.
*Material, name=mat_55
*Density
 1.08e-09,
*Hyperelastic, neo hooke
 0.173864, 0.575163,       0.,       0.,       0.,       0.
*Material, name=mat_56
*Density
 1.08e-09,
*Hyperelastic, neo hooke
 0.175, 0.571429,       0.,       0.,       0.,       0.
*Material, name=mat_57
*Density
 1.08e-09,
*Hyperelastic, neo hooke
 0.176136, 0.567742,       0.,       0.,       0.,       0.
*Material, name=mat_58
*Density
 1.08e-09,
*Hyperelastic, neo hooke
 0.177273, 0.564102,       0.,       0.,       0.,       0.
*Material, name=mat_59
*Density
 1.08e-09,
*Hyperelastic, neo hooke
 0.178409, 0.56051,      0.,      0.,      0.,      0.
*Material, name=mat_60
*Density
 1.08e-09,
*Hyperelastic, neo hooke
 0.179545, 0.556962,       0.,       0.,       0.,       0.
*Material, name=mat_61
*Density
 1.08e-09,
*Hyperelastic, neo hooke
 0.180682, 0.553459,       0.,       0.,       0.,       0.
*Material, name=mat_62
*Density
 1.08e-09,
*Hyperelastic, neo hooke
 0.181818,0.549999945000005,   0.,   0.,   0.,   0.
*Material, name=mat_63
*Density
 1.08e-09,
*Hyperelastic, neo hooke
 0.182955, 0.546584,       0.,       0.,       0.,       0.
*Material, name=mat_64
*Density
 1.08e-09,
*Hyperelastic, neo hooke
 0.184091, 0.54321,      0.,      0.,      0.,      0.
*Material, name=mat_65
*Density
 1.08e-09,
*Hyperelastic, neo hooke
 0.185227, 0.539877,       0.,       0.,       0.,       0.
*Material, name=mat_66
*Density
 1.08e-09,
*Hyperelastic, neo hooke
 0.186364, 0.536585,       0.,       0.,       0.,       0.
*Material, name=mat_67
*Density
 1.08e-09,
*Hyperelastic, neo hooke
 0.1875, 0.533333,       0.,       0.,       0.,       0.
*Material, name=mat_68
*Density
 1.08e-09,
*Hyperelastic, neo hooke
 0.188636, 0.530121,       0.,       0.,       0.,       0.
*Material, name=mat_69
*Density
 1.08e-09,
*Hyperelastic, neo hooke
 0.189773, 0.526946,       0.,       0.,       0.,       0.
*Material, name=mat_70
*Density
 1.08e-09,
*Hyperelastic, neo hooke
 0.190909, 0.523809,       0.,       0.,       0.,       0.
*Material, name=mat_71
*Density
 1.08e-09,
*Hyperelastic, neo hooke
 0.192045, 0.52071,      0.,      0.,      0.,      0.
*Material, name=mat_72
*Density
 1.08e-09,
*Hyperelastic, neo hooke
 0.193182, 0.517647,       0.,       0.,       0.,       0.
*Material, name=mat_73
*Density
 1.08e-09,
*Hyperelastic, neo hooke
 0.194318, 0.51462,      0.,      0.,      0.,      0.
*Material, name=mat_74
*Density
 1.08e-09,
*Hyperelastic, neo hooke
 0.195455, 0.511628,       0.,       0.,       0.,       0.
*Material, name=mat_75
*Density
 1.08e-09,
*Hyperelastic, neo hooke
 0.196591, 0.508671,       0.,       0.,       0.,       0.
*Material, name=mat_76
*Density
 1.08e-09,
*Hyperelastic, neo hooke
 0.197727, 0.505747,       0.,       0.,       0.,       0.
*Material, name=mat_77
*Density
 1.08e-09,
*Hyperelastic, neo hooke
 0.198864, 0.502857,       0.,       0.,       0.,       0.
*Material, name=mat_78
*Density
 1.08e-09,
*Hyperelastic, neo hooke
 0.2, 0.5,  0.,  0.,  0.,  0.
*Material, name=mat_79
*Density
 1.08e-09,
*Hyperelastic, neo hooke
 0.201136, 0.497175,       0.,       0.,       0.,       0.
*Material, name=mat_80
*Density
 1.08e-09,
*Hyperelastic, neo hooke
 0.202273, 0.494382,       0.,       0.,       0.,       0.
*Material, name=mat_81
*Density
 1.08e-09,
*Hyperelastic, neo hooke
 0.203409, 0.49162,      0.,      0.,      0.,      0.
*Material, name=mat_82
*Density
 1.08e-09,
*Hyperelastic, neo hooke
 0.204545, 0.488889,       0.,       0.,       0.,       0.
*Material, name=mat_83
*Density
 1.08e-09,
*Hyperelastic, neo hooke
 0.205682, 0.486188,       0.,       0.,       0.,       0.
*Material, name=mat_84
*Density
 1.08e-09,
*Hyperelastic, neo hooke
 0.206818, 0.483516,       0.,       0.,       0.,       0.
*Material, name=mat_85
*Density
 1.08e-09,
*Hyperelastic, neo hooke
 0.207955, 0.480874,       0.,       0.,       0.,       0.
*Material, name=mat_86
*Density
 1.08e-09,
*Hyperelastic, neo hooke
 0.209091, 0.478261,       0.,       0.,       0.,       0.
*Material, name=mat_87
*Density
 1.08e-09,
*Hyperelastic, neo hooke
 0.210227, 0.475676,       0.,       0.,       0.,       0.
*Material, name=mat_88
*Density
 1.08e-09,
*Hyperelastic, neo hooke
 0.211364, 0.473118,       0.,       0.,       0.,       0.
*Material, name=mat_89
*Density
 1.08e-09,
*Hyperelastic, neo hooke
 0.2125, 0.470588,       0.,       0.,       0.,       0.
*Material, name=mat_90
*Density
 1.08e-09,
*Hyperelastic, neo hooke
 0.213636, 0.468085,       0.,       0.,       0.,       0.
*Material, name=mat_91
*Density
 1.08e-09,
*Hyperelastic, neo hooke
 0.214773, 0.465608,       0.,       0.,       0.,       0.
*Material, name=mat_92
*Density
 1.08e-09,
*Hyperelastic, neo hooke
 0.215909, 0.463158,       0.,       0.,       0.,       0.
*Material, name=mat_93
*Density
 1.08e-09,
*Hyperelastic, neo hooke
 0.217045, 0.460733,       0.,       0.,       0.,       0.
*Material, name=mat_94
*Density
 1.08e-09,
*Hyperelastic, neo hooke
 0.218182, 0.458333,       0.,       0.,       0.,       0.
*Material, name=mat_95
*Density
 1.08e-09,
*Hyperelastic, neo hooke
 0.219318, 0.455959,       0.,       0.,       0.,       0.
*Material, name=mat_96
*Density
 1.08e-09,
*Hyperelastic, neo hooke
 0.220455, 0.453608,       0.,       0.,       0.,       0.
*Material, name=mat_97
*Density
 1.08e-09,
*Hyperelastic, neo hooke
 0.221591, 0.451282,       0.,       0.,       0.,       0.
*Material, name=mat_98
*Density
 1.08e-09,
*Hyperelastic, neo hooke
 0.222727, 0.44898,      0.,      0.,      0.,      0.
*Material, name=mat_99
*Density
 1.08e-09,
*Hyperelastic, neo hooke
 0.223864, 0.4467,     0.,     0.,     0.,     0.
*Material, name=mat_100
*Density
 1.08e-09,
*Hyperelastic, neo hooke
 0.225, 0.444444,       0.,       0.,       0.,       0.
**
** BOUNDARY CONDITIONS
**
** Name: BC-1 Type: Displacement/Rotation
*Boundary
final_model-1.surface_0_Bottom, 1, 1
final_model-1.surface_0_Bottom, 2, 2
final_model-1.surface_0_Bottom, 3, 3
final_model-1.surface_0_Bottom, 4, 4
final_model-1.surface_0_Bottom, 5, 5
final_model-1.surface_0_Bottom, 6, 6
** ----------------------------------------------------------------
**
** STEP: Step-Pressure
**
*Step, name=Step-Pressure, nlgeom=YES
*Static
1., 1., 1e-05, 1.
**
** OUTPUT REQUESTS
**
*Restart, write, frequency=0
**
** FIELD OUTPUT: F-Output-1
**
*Output, field
*Node Output
U,
**
** HISTORY OUTPUT: H-Output-1
**
*Output, history, variable=PRESELECT
*End Step
** ----------------------------------------------------------------
**
** STEP: Step-ADJ-1
**
*Step, name=Step-ADJ-1, nlgeom=NO, perturbation
*Static
**
** OUTPUT REQUESTS
**
**
** FIELD OUTPUT: Perturb-output
**
*Output, field
*Node Output
U,
**
** HISTORY OUTPUT: H-Output-2
**
*Output, history, variable=PRESELECT
*End Step
